units real
boundary p p p # ffield uses periodic z-boundary and no slab

if "$(extract_setting(world_size)) > 1" then "processors * * 2"

atom_style full
pair_style lj/cut/coul/long 16
bond_style harmonic
angle_style harmonic
kspace_style pppm/electrode 1e-7

read_data "data.graph-il"

group bot molecule 641
group top molecule 642

group bmi type 1 2 3
group electrolyte type 1 2 3 4

fix conp bot electrode/conp -1.0 1.979 couple top 1.0 symm on etypes 6*7 ffield yes
fix nvt electrolyte nvt temp 500.0 500.0 100
fix shake bmi shake 1e-4 20 0 b 1 2 a 1

variable q atom q
compute qtop top reduce sum v_q
compute qbot bot reduce sum v_q
compute ctemp electrolyte temp

thermo 50
thermo_style custom step temp c_ctemp epair etotal c_qbot c_qtop
run 500
