units real
boundary p p f

if "$(extract_setting(world_size)) > 1" then "processors * * 2"

atom_style full
pair_style lj/cut/coul/long 8
bond_style harmonic
angle_style harmonic
kspace_style pppm/electrode 1e-6
kspace_modify slab 3.0

read_data "data.au-aq"

group bot type 6
group top type 7

group SPC type 1 2 3
group electrolyte type 1 2 3 4 5

fix nvt electrolyte nvt temp 298.0 298.0 241
fix shake SPC shake 1e-4 20 0 b 1 2 a 1

variable q atom q
compute qtop top reduce sum v_q
compute qbot bot reduce sum v_q
compute ctemp electrolyte temp

thermo 50
